Simulations: Version=169
  DataStore
  Experiment Barley
    Factors
      Factor WeatherYear
        CompositeFactor 2021_00000
          Specifications:
            [Clock].StartDate = 2021-01-01
            [Clock].EndDate = 2021-12-31
            [Weather]
          Weather 2021_00000: FileName=met files1\s2021_00000.met
    Simulation
      Clock: Start=2021-01-01; End=2021-12-31
      Summary
      Weather: FileName=train.met
      SoilArbitrator
      MicroClimate: a_interception=0; b_interception=1; c_interception=0; d_interception=0; SoilHeatFluxFraction=0.4; MinimumHeightDiffForNewLayer=0; NightInterceptionFraction=0.5; ReferenceHeight=2
      Zone Field: Area=1; Slope=0; AspectAngle=0; Altitude=50
        Report
          VariableNames:
            [Clock].Today
            [Barley].Grain.Total.Wt*10 as Yield
            [Soil].Water.MM
          EventNames:
            [Barley].Harvesting
            17-mar
        Fertiliser
        SurfaceOrganicMatter: InitialResidueName=wheat_stubble; InitialResidueType=wheat; InitialResidueMass=500; InitialStandingFraction=0; InitialCPR=0; InitialCNR=100
        Plant Barley
        Manager Sow using a variable rule
          Crop = [Barley]
          StartDate = 15-may
          EndDate = 10-jul
          MinESW = 0
          MinRain = 25
          RainDays = 3
          CultivarName = Dash
          SowingDepth = 30
          RowSpacing = 250
          Population = 180
```csharp
using Models.Interfaces;
using APSIM.Shared.Utilities;
using Models.Utilities;
using Models.Soils;
using Models.PMF;
using Models.Core;
using System;
using System.Linq;
using Models.Climate;

namespace Models
{
    [Serializable]
    public class Script : Model
    {
        [Link] private Clock Clock;
        [Link] private Fertiliser Fertiliser;
        [Link] private Summary Summary;
        [Link] private Soil Soil;
        private Accumulator accumulatedRain;
        [Link]
        private ISoilWater waterBalance;
        
        [Description("Crop")]
        public IPlant Crop { get; set; }

        [Description("Start of sowing window (d-mmm)")]
        public string StartDate { get; set; }

        [Description("End of sowing window (d-mmm)")]
        public string EndDate { get; set; }

        [Description("Minimum extractable soil water for sowing (mm)")]
        public double MinESW { get; set; }

        [Description("Accumulated rainfall required for sowing (mm)")]
        public double MinRain { get; set; }

        [Description("Duration of rainfall accumulation (d)")]
        public int RainDays { get; set; }

        [Display(Type = DisplayType.CultivarName)]
        [Description("Cultivar to be sown")]
        public string CultivarName { get; set; }

        [Description("Sowing depth (mm)")]
        public double SowingDepth { get; set; }

        [Description("Row spacing (mm)")]
        public double RowSpacing { get; set; }

        [Description("Plant population (/m2)")]
        public double Population { get; set; }
        
        
        [EventSubscribe("StartOfSimulation")]
        private void OnSimulationCommencing(object sender, EventArgs e)
        {
            accumulatedRain = new Accumulator(this, "[Weather].Rain", RainDays);
        }

        [EventSubscribe("DoManagement")]
        private void OnDoManagement(object sender, EventArgs e)
        {
            accumulatedRain.Update();
            
            if ((DateUtilities.WithinDates(StartDate, Clock.Today, EndDate) &&
                 !Crop.IsAlive &&
                 MathUtilities.Sum(waterBalance.ESW) > MinESW &&
                 accumulatedRain.Sum > MinRain) ||
                (DateUtilities.DatesEqual(EndDate, Clock.Today)))
            {
                Crop.Sow(population: Population, cultivar: CultivarName, depth: SowingDepth, rowSpacing: RowSpacing);    
            }
        }
    }
}
```
        Manager Fertilise at sowing
          Crop = [Barley]
          FertiliserType = UreaN
          Amount = 350
```csharp
using Models.Soils;
using System;
using System.Linq;
using Models.Core;
using Models.PMF;
namespace Models
{
    [Serializable]
    public class Script : Model
    {
        [Link] Clock Clock;
        [Link] Fertiliser Fertiliser;
        
        [Description("Crop to be fertilised")]
        public IPlant Crop { get; set; }

        [Description("Type of fertiliser to apply? ")] 
        public Fertiliser.Types FertiliserType { get; set; }
    
        [Description("Amount of fertiliser to be applied (kg/ha)")]
        public double Amount { get; set; }
        
        [EventSubscribe("Sowing")]
        private void OnSowing(object sender, EventArgs e)
        {
            Model crop = sender as Model;
            if (Crop != null && crop.Name.ToLower() == (Crop as IModel).Name.ToLower())
                Fertiliser.Apply(Amount: Amount, Type: FertiliserType);
        }
    }
}
```
        Manager Harvest
          Crop = [Barley]
```csharp
using APSIM.Shared.Utilities;
using Models.Utilities;
using Models.Soils;
using Models.PMF;
using Models.Core;
using System;
using System.Linq;

namespace Models
{
    [Serializable] 
    public class Script : Model
    {
        [Description("Crop")]
        public IPlant Crop { get; set; }
        
        [EventSubscribe("DoManagement")]
        private void OnDoManagement(object sender, EventArgs e)
        {
            if (Crop.IsReadyForHarvesting)
            {
                Crop.Harvest();
                Crop.EndCrop();
            }
        }
    }
}
```
        Soil Synthetic Soil Derived from the SLGA: ASCOrder=NA; ASCSubOrder=NA; SoilType=Sandy Loam over Sandy Clay; Site=32598_32115; NearestTown=ROBE; Region=Naracoorte Coastal Plain; State=South Australia; NaturalVegetation=Unknown; ApsoilNumber=9999; Latitude=-37.1655; Longitude=139.762471; LocationAccuracy=+- 90m; YearOfSampling=2024; Comments=Landuse is Grazing natural vegetation
          DataSource=Soil and Landscape Grid of Australia. This soil parameter file was automatically generated from the GSM National Surfaces using pedotransfer functions.
          Water: Thickness=[150, 150, 150, 150, 200, 200]; InitialValues=[0.162, 0.16, 0.168, 0.173, 0.172, 0.171]; InitialPAWmm=15.9033; RelativeTo=LL15; FilledFromTop=false
          Physical
            Thickness  BD       AirDry     LL15      DUL       SAT       KS
            150        1.35853  0.0473996  0.142199  0.242781  0.423109  46.4201
            150        1.40711  0.0478225  0.143467  0.226155  0.412784  27.2103
            150        1.41518  0.0509148  0.152744  0.230016  0.414413  17.9827
            150        1.41523  0.0524938  0.157481  0.233798  0.416021  15.3859
            200        1.42536  0.0525384  0.157615  0.231707  0.413136  14.6164
            200        1.43974  0.0520664  0.156199  0.227906  0.408413  14.4322
            SoilCrop WheatSoil: LL=[0.148234, 0.148429, 0.157355, 0.16168, 0.161173, 0.159069]; KL=[0.06, 0.06, 0.0596733, 0.05502, 0.04802, 0.04002]; XF=[1, 1, 1, 1, 1, 1]
            SoilCrop EucalyptusSoil: LL=[0.148234, 0.148429, 0.157355, 0.16168, 0.161173, 0.159069]; KL=[0.06, 0.06, 0.0596733, 0.05502, 0.04802, 0.04002]; XF=[1, 1, 1, 1, 1, 1]
            SoilCrop PinusSoil: LL=[0.148234, 0.148429, 0.157355, 0.16168, 0.161173, 0.159069]; KL=[0.06, 0.06, 0.0596733, 0.05502, 0.04802, 0.04002]; XF=[1, 1, 1, 1, 1, 1]
            SoilCrop SCRUMSoil: LL=[0.148234, 0.148429, 0.157355, 0.16168, 0.161173, 0.159069]; KL=[0.06, 0.06, 0.0596733, 0.05502, 0.04802, 0.04002]; XF=[1, 1, 1, 1, 1, 1]
            SoilCrop OatsSoil: LL=[0.148234, 0.148429, 0.157355, 0.16168, 0.161173, 0.159069]; KL=[0.06, 0.06, 0.0596733, 0.05502, 0.04802, 0.04002]; XF=[1, 1, 1, 1, 1, 1]
            SoilCrop SorghumSoil: LL=[0.14924, 0.149256, 0.158131, 0.162491, 0.162025, 0.159965]; KL=[0.07, 0.07, 0.0697142, 0.0656425, 0.0595175, 0.0525175]; XF=[1, 1, 1, 1, 1, 1]
            SoilCrop BarleySoil: LL=[0.14924, 0.149256, 0.158127, 0.162432, 0.161888, 0.159744]; KL=[0.07, 0.07, 0.0696637, 0.0648735, 0.0576676, 0.0494324]; XF=[1, 1, 1, 1, 1, 1]
            SoilCrop ChickpeaSoil: LL=[0.148234, 0.148429, 0.157381, 0.16206, 0.16172, 0.15951]; KL=[0.06, 0.06, 0.06, 0.06, 0.0554077, 0.0461769]; XF=[1, 1, 1, 1, 1, 1]
            SoilCrop MungbeanSoil
              LL=[0.148234, 0.148429, 0.157381, 0.161909, 0.161174, 0.158783]
              KL=[0.06, 0.06, 0.06, 0.05802, 0.04803, 0.03603]
              XF=[1, 1, 1, 1, 1, 1]
            SoilCrop CottonSoil
              LL=[0.152257, 0.151736, 0.160471, 0.165113, 0.165024, 0.162974]
              KL=[0.1, 0.1, 0.1, 0.1, 0.1, 0.0944722]
              XF=[1, 1, 1, 1, 1, 1]
            SoilCrop CanolaSoil: LL=[0.148234, 0.148429, 0.157355, 0.16168, 0.161173, 0.159069]; KL=[0.06, 0.06, 0.0596733, 0.05502, 0.04802, 0.04002]; XF=[1, 1, 1, 1, 1, 1]
            SoilCrop Pigeon PeaSoil: LL=[0.148234, 0.148429, 0.157381, 0.16206, 0.161692, 0.159428]; KL=[0.06, 0.06, 0.06, 0.06, 0.055025, 0.045025]; XF=[1, 1, 1, 1, 1, 1]
            SoilCrop MaizeSoil: LL=[0.148234, 0.148429, 0.157355, 0.16168, 0.161173, 0.159069]; KL=[0.06, 0.06, 0.0596733, 0.05502, 0.04802, 0.04002]; XF=[1, 1, 1, 1, 1, 1]
            SoilCrop CowpeasSoil: LL=[0.148234, 0.148429, 0.157355, 0.16168, 0.161173, 0.159069]; KL=[0.06, 0.06, 0.0596733, 0.05502, 0.04802, 0.04002]; XF=[1, 1, 1, 1, 1, 1]
            SoilCrop SunflowerSoil
              LL=[0.152209, 0.151131, 0.159224, 0.163207, 0.162412, 0.159998]
              KL=[0.0995196, 0.0926765, 0.0838529, 0.0750294, 0.0647353, 0.0529706]
              XF=[1, 1, 1, 1, 1, 1]
            SoilCrop FababeanSoil
              LL=[0.150245, 0.150082, 0.158926, 0.163587, 0.163438, 0.161118]
              KL=[0.08, 0.08, 0.08, 0.08, 0.0785857, 0.0686]
              XF=[1, 1, 1, 1, 1, 1]
            SoilCrop LucerneSoil: LL=[0.152257, 0.151736, 0.160471, 0.165113, 0.165024, 0.16337]; KL=[0.1, 0.1, 0.1, 0.1, 0.1, 0.1]; XF=[1, 1, 1, 1, 1, 1]
            SoilCrop PerennialsSoil
              LL=[0.152257, 0.151736, 0.160471, 0.165113, 0.165024, 0.162974]
              KL=[0.1, 0.1, 0.1, 0.1, 0.1, 0.0944722]
              XF=[1, 1, 1, 1, 1, 1]
            SoilCrop LupinsSoil: LL=[0.148234, 0.148429, 0.157355, 0.16168, 0.161173, 0.159069]; KL=[0.06, 0.06, 0.0596733, 0.05502, 0.04802, 0.04002]; XF=[1, 1, 1, 1, 1, 1]
            SoilCrop LentilsSoil: LL=[0.148234, 0.148429, 0.157355, 0.16168, 0.161173, 0.159069]; KL=[0.06, 0.06, 0.0596733, 0.05502, 0.04802, 0.04002]; XF=[1, 1, 1, 1, 1, 1]
            SoilCrop TriticaleSoil: LL=[0.14924, 0.149256, 0.157787, 0.161733, 0.160918, 0.158483]; KL=[0.07, 0.07, 0.0652591, 0.0557136, 0.0445773, 0.03185]; XF=[1, 1, 1, 1, 1, 1]
            SoilCrop MilletSoil: LL=[0.14924, 0.149256, 0.158131, 0.162491, 0.162025, 0.159965]; KL=[0.07, 0.07, 0.0697142, 0.0656425, 0.0595175, 0.0525175]; XF=[1, 1, 1, 1, 1, 1]
            SoilCrop SoybeansSoil: LL=[0.148234, 0.148429, 0.157355, 0.16168, 0.161173, 0.159069]; KL=[0.06, 0.06, 0.0596733, 0.05502, 0.04802, 0.04002]; XF=[1, 1, 1, 1, 1, 1]
            SoilCrop Pasture grasses & legumesSoil: LL=[0.148234, 0.148429, 0.157355, 0.16168, 0.161173, 0.159069]; KL=[0.06, 0.06, 0.0596733, 0.05502, 0.04802, 0.04002]; XF=[1, 1, 1, 1, 1, 1]
          WaterBalance SoilWater: SummerDate=1-nov; SummerU=6; SummerCona=6; WinterDate=1-apr; WinterU=2; WinterCona=2; DiffusConst=216.575; DiffusSlope=51.3944; Salb=0.13; CN2Bare=78; CNRed=20; CNCov=0; DischargeWidth=10; CatchmentArea=161087; PSIDul=-100; Thickness=[150, 150, 150, 150, 200, 200]
            SWCON=[0.447548, 0.374153, 0.315955, 0.294673, 0.241676, 0.240894]
          Organic: FOMCNRatio=40; CarbonUnits=Total
            Thickness  Carbon    SoilCNRatio  FBiom    FInert    FOM
            150        1.74136   12.1221      0.04     0.204162  475.475
            150        0.816209  12.1221      0.03106  0.440886  303.176
            150        0.47131   12.1221      0.01404  0.741468  193.314
            150        0.400901  12.1221      0.01     0.871727  123.262
            200        0.322901  12.1221      0.01     0.993681  67.6477
            200        0.246051  12.1221      0.01     1         37.1259
          Chemical: Thickness=[150, 150, 150, 150, 200, 200]; PH=[7.06332, 7.44491, 7.44426, 7.43318, 7.7276, 8.06226]; PHUnits=Water
          Solute NO3: Thickness=[1800]; InitialValues=[3]; InitialValuesUnits=ppm; WaterTableConcentration=0; D0=0; DepthConstant=0; MaxDepthSoluteAccessible=0; RunoffEffectivenessAtMovingSolute=0; MaxEffectiveRunoff=0
          Solute NH4: Thickness=[1800]; InitialValues=[1]; InitialValuesUnits=ppm; WaterTableConcentration=0; D0=0; DepthConstant=0; MaxDepthSoluteAccessible=0; RunoffEffectivenessAtMovingSolute=0; MaxEffectiveRunoff=0
          Solute Urea: Thickness=[1800]; InitialValues=[0]; InitialValuesUnits=ppm; WaterTableConcentration=0; D0=0; DepthConstant=0; MaxDepthSoluteAccessible=0; RunoffEffectivenessAtMovingSolute=0; MaxEffectiveRunoff=0
          CERESSoilTemperature
          Nutrient
        Soil Deep gradational sandy loam (Lucindale No1252) (disabled): ASCOrder=Kandosol; ASCSubOrder=Brown; SoilType=Clay loam; Site=Greenways; NearestTown=Lucindale; Region=Lower Southeast; State=South Australia; Country=Australia; ApsoilNumber=1252; Latitude=-37.196722; Longitude=140.232481; LocationAccuracy=+/- 5m; YearOfSampling=2015
          DataSource=CSIRO in collaboration with GRDC Project 'Measuring and managing soil water in Australian agriculture'
          Comments=Deep gradational sandy loam - Soil is located in a plain. This profile hit calcrete so could be extended in similar soils that are deeper. Tentative characterisation only. Shallow soil on calcrete. Crops may in some situations be able to extract water from calcrete or cracks within calcrete. Plant available water within calcrete layer still to be assessed. Yields may be underestimated with current characterisation.
          Physical
            Thickness  ParticleSizeClay  ParticleSizeSand  ParticleSizeSilt  BD     AirDry  LL15   DUL    SAT
            100        20.26             42.69             37.05             0.817  0.089   0.179  0.413  0.642
            100        24.61             40.32             35.06             1.015  0.173   0.216  0.368  0.567
            200        27.75             57.8              14.46             1.387  0.229   0.229  0.295  0.426
            200        34.93             50.4              14.67             1.31   0.24    0.24   0.35   0.456
            BD, DUL source: Field measured and checked for sensibility
            AirDry, LL15 source: Estimated based on local knowledge
            SAT source: Calculated from measured, estimated or calculated BD
            SoilCrop wheatSoil: LL=[0.179, 0.216, 0.229, 0.24]; KL=[0.06, 0.06, 0.06, 0.06]; XF=[1, 1, 1, 1]
              LL source: Field measured and checked for sensibility
            SoilCrop barleySoil: same as Barley.Simulation.Field.Deep gradational sandy loam (Lucindale No1252).Physical.wheatSoil
            SoilCrop canolaSoil: same as Barley.Simulation.Field.Deep gradational sandy loam (Lucindale No1252).Physical.wheatSoil
          WaterBalance SoilWater: SummerDate=1-nov; SummerU=6; SummerCona=3.5; WinterDate=1-apr; WinterU=2; WinterCona=2; DiffusConst=88; DiffusSlope=35; Salb=0.14; CN2Bare=73; CNRed=20; CNCov=0.8; PSIDul=-100; Thickness=[100, 100, 200, 200]; SWCON=[0.5, 0.5, 0.5, 0.3]
          Organic: FOMCNRatio=40; CarbonUnits=WalkleyBlack
            Thickness  Carbon  SoilCNRatio  FBiom  FInert  FOM
            100        3.9     12           0.035  0.4     523.082
            100        3.32    12           0.02   0.5     317.265
            200        1.03    12           0.015  0.7     116.715
            200        0.68    12           0.015  0.95    42.9372
          Chemical: PHUnits=Water
            Thickness  PH   EC     ESP       CEC
            100        8.1  0.27   0.637066  51.8
            100        8.2  0.21   0.623557  43.3
            200        8.5  0.161  0.782313  29.4
            200        8.6  0.144  0.777778  27
            EC, CL, PH source: Measured
            ESP source: C
          Nutrient
          Solute NO3: InitialValuesUnits=ppm; WaterTableConcentration=0; D0=0; DepthConstant=0; MaxDepthSoluteAccessible=0; RunoffEffectivenessAtMovingSolute=0; MaxEffectiveRunoff=0
          Solute NH4: InitialValuesUnits=ppm; WaterTableConcentration=0; D0=0; DepthConstant=0; MaxDepthSoluteAccessible=0; RunoffEffectivenessAtMovingSolute=0; MaxEffectiveRunoff=0
          Solute Urea: Thickness=[100, 100, 200, 200]; InitialValues=[0, 0, 0, 0]; InitialValuesUnits=kg/ha; WaterTableConcentration=0; D0=0; DepthConstant=0; MaxDepthSoluteAccessible=0; RunoffEffectivenessAtMovingSolute=0; MaxEffectiveRunoff=0
          Water: Thickness=[100, 100, 200, 200]; InitialValues=[0.413, 0.292, 0.229, 0.24]; InitialPAWmm=31; RelativeTo=LL15; FilledFromTop=true
          CERESSoilTemperature
