Simulations: Version=169
  DataStore
  Experiment Senario2
    Factors
      Permutation
        Factor Weather: Specification=[Weather]
          Weather 0: FileName=train.met
        Factor Rotation: Specification=[RotationManager]
          RotationManager WBC: TopLevel=true; InitialState=sf1; Verbose=false
            Nodes:
              Name    OutlineColour
              sf2     Black
              Wheat   Black
              Barley  Black
              sf3     Black
              Canola  Black
              sf1     Black
            Arcs:
              {Conditions=[[WheatManager].Script.CanSow], Actions=[[WheatManager].Script.SowCrop()], SourceName=sf1, DestinationName=Wheat, Name=Arc 5}
              {Conditions=[[WheatManager].Script.CanHarvest], Actions=[[WheatManager].Script.HarvestCrop("")], SourceName=Wheat, DestinationName=sf2, Name=Arc 1}
              {Conditions=[[BarleyManager].Script.CanSow], Actions=[[BarleyManager].Script.SowCrop()], SourceName=sf2, DestinationName=Barley, Name=Arc 2}
              {Conditions=[[BarleyManager].Script.CanHarvest], Actions=[[BarleyManager].Script.HarvestCrop("")], SourceName=Barley, DestinationName=sf3, Name=Arc 3}
              {Conditions=[[CanolaManager].Script.CanSow], Actions=[[CanolaManager].Script.SowCrop()], SourceName=sf3, DestinationName=Canola, Name=Arc 4}
              {Conditions=[[CanolaManager].Script.CanHarvest], Actions=[[CanolaManager].Script.HarvestCrop("")], SourceName=Canola, DestinationName=sf1, Name=Arc 6}
        Factor Clock: Specification=[Clock]
          Clock 0: Start=2021-02-18; End=2024-02-17
    Simulation
      Clock: Start=2021-02-18; End=2024-02-17
      Summary SummaryFile
      Weather: FileName=train.met
      SoilArbitrator Soil Arbitrator
      Zone Field: Area=1; Slope=0; AspectAngle=0; Altitude=50
        Fertiliser
        SurfaceOrganicMatter: InitialResidueName=wheat_stubble; InitialResidueType=wheat; InitialResidueMass=500; InitialStandingFraction=0; InitialCPR=0; InitialCNR=100
        MicroClimate: a_interception=0; b_interception=1; c_interception=0; d_interception=0; SoilHeatFluxFraction=0.4; MinimumHeightDiffForNewLayer=0; NightInterceptionFraction=0.5; ReferenceHeight=2
        RotationManager: TopLevel=true; InitialState=sf1; Verbose=false
          Nodes:
            Name    OutlineColour
            sf2     Black
            Wheat   Black
            Barley  Black
            sf3     Black
            Canola  Black
            sf1     Black
          Arcs:
            {Conditions=[[WheatManager].Script.CanHarvest], Actions=[[WheatManager].Script.HarvestCrop("")], SourceName=Wheat, DestinationName=sf2, Name=Arc 1}
            {Conditions=[[BarleyManager].Script.CanSow], Actions=[[BarleyManager].Script.SowCrop()], SourceName=sf2, DestinationName=Barley, Name=Arc 2}
            {Conditions=[[WheatManager].Script.CanSow], Actions=[[WheatManager].Script.SowCrop()], SourceName=sf1, DestinationName=Wheat, Name=Arc 5}
            {Conditions=[[CanolaManager].Script.CanSow], Actions=[[CanolaManager].Script.SowCrop()], SourceName=sf3, DestinationName=Canola, Name=Arc 4}
            {Conditions=[[CanolaManager].Script.CanHarvest], Actions=[[CanolaManager].Script.HarvestCrop("")], SourceName=Canola, DestinationName=sf1, Name=Arc 6}
            {Conditions=[[BarleyManager].Script.CanHarvest], Actions=[[BarleyManager].Script.HarvestCrop("")], SourceName=Barley, DestinationName=sf3, Name=Arc 3}
        Plant Wheat
        Plant Barley
        Plant Canola
        Manager WheatManager
          Crop = [Wheat]
          Verbose = False
          StartDate = 15-may
          EndDate = 10-jul
          MinESW = 0
          MinRain = 25
          RainDays = 3
          MustSow = True
          CultivarName = Hartog
          SowingDepth = 30
          RowSpacing = 250
          Population = 180
```csharp
using Models.Interfaces;
using APSIM.Shared.Utilities;
using Models.Utilities;
using Models.Soils;
using Models.PMF;
using Models.Core;
using System;
using System.Linq;
using Models.Climate;

namespace Models
{
    [Serializable]
    public class Script : Model
    {
        [Link] private Clock Clock;
        [Link] private Summary Summary;
        [Link] private Soil Soil;
        private Accumulator accumulatedRain;
        [Link]
        private ISoilWater waterBalance;

        [Separator("Script Configuration")]
        [Description("Crop to manage")]
        public IPlant Crop { get; set; }
        [Description("Run script in verbose mode?")]
        [Tooltip("If enabled, the script will print a large number of diagnostics to the summary file, to aid debugging")]
        public bool Verbose { get; set; }

        [Separator("Sowing Conditions")]
        [Description("Start of sowing window (d-mmm)")]
        public string StartDate { get; set;}
        [Description("End of sowing window (d-mmm)")]
        public string EndDate { get; set;}
        [Description("Minimum extractable soil water for sowing (mm)")]
        public double MinESW { get; set;}
        [Description("Accumulated rainfall required for sowing (mm)")]
        public double MinRain { get; set;}
        [Description("Duration of rainfall accumulation (d)")]
        public int RainDays { get; set;}

        [Tooltip("If enabled, and if sowing conditions are not met, the crop will be sown on the final day of the sowing window.")]
        [Description("Must sow (yes/no)")]
        public bool MustSow { get; set;}
        [Separator("Sowing Properties")]
        [Description("Cultivar to be sown")]
        [Display(Type=DisplayType.CultivarName)]
        public string CultivarName { get; set;}
        [Description("Sowing depth (mm)")]
        public double SowingDepth { get; set;}        
        [Description("Row spacing (mm)")]
        public double RowSpacing { get; set;}    
        [Description("Plant population (/m2)")]
        public double Population { get; set;}    

        private bool afterInit = false;

        [EventSubscribe("StartOfSimulation")]
        private void OnSimulationCommencing(object sender, EventArgs e)
        {
            if (Crop == null) { throw new Exception("Crop must not be null in rotations"); }
            accumulatedRain = new Accumulator(this, "[Weather].Rain", RainDays);
            afterInit = true;
            Summary.WriteMessage(this, this.FullPath + " - Commence, crop=" + (Crop as Model).Name, MessageType.Diagnostic);
        }
        
        [EventSubscribe("DoManagement")]
        private void DoManagement(object sender, EventArgs e)
        {
            accumulatedRain.Update();
        }

        // Test whether we can sow a crop today
        // +ve number - yes
        // 0          - no
        // -ve number - no, out of scope (planting window)
        [Units("0-1")]
        public bool CanSow
        {
            get
            {
                if (!afterInit)
                    return false;
                bool isPossibleToday = false;
                bool inWindow = DateUtilities.WithinDates(StartDate, Clock.Today, EndDate);
                bool endOfWindow = DateUtilities.DatesEqual(EndDate, Clock.Today);
                if (! Crop.IsAlive && inWindow && accumulatedRain.Sum > MinRain && MathUtilities.Sum(waterBalance.ESW) > MinESW) 
                    isPossibleToday = true;

                   if (Verbose)
                {
                    if (isPossibleToday)
                        Summary.WriteMessage(this, "Sowing is possible today", MessageType.Diagnostic);
                    else if (!Crop.IsAlive && endOfWindow && MustSow)
                        Summary.WriteMessage(this, "Sowing is possible today, but conditions are not ideal. Only sowing because MustSow is set to yes", MessageType.Diagnostic);
                    else if (Crop.IsAlive)
                        Summary.WriteMessage(this, "Not sowing today because crop is already alive", MessageType.Diagnostic);
                    else if (!inWindow)
                        Summary.WriteMessage(this, string.Format("Not sowing today because current date ({0}) is not in sowing window ({1} - {2}).", Clock.Today.ToString("dd-MMM"), StartDate, EndDate), MessageType.Diagnostic);
                    else if (!(accumulatedRain.Sum > MinRain))
                        Summary.WriteMessage(this, string.Format("Not sowing today because accumulated rain ({0}) is less than min rain required for sowing ({1})", accumulatedRain.Sum, MinRain), MessageType.Diagnostic);
                    else if (!(MathUtilities.Sum(waterBalance.ESW) > MinESW))
                        Summary.WriteMessage(this, string.Format("Not sowing today because ESW ({0}) is less than min ESW required for sowing ({1})", MathUtilities.Sum(waterBalance.ESW), MinESW), MessageType.Diagnostic);
                }

               if (isPossibleToday)
                   return true;

               if (! Crop.IsAlive && endOfWindow && MustSow) 
                   return true;

               if (! Crop.IsAlive && !inWindow)
                   return false;

               return false;
            }
        }

        public void SowCrop()
        {
           Summary.WriteMessage(this, this.FullPath + " -  sowing " + (Crop as Model).Name, MessageType.Diagnostic);
           Crop.Sow(population:Population, cultivar:CultivarName, depth:SowingDepth, rowSpacing:RowSpacing);    
        }

        [Units("0-1")]
        public int CanHarvest
        {
           get
           {
             if (!afterInit)
                 return 0;
             return Crop.IsReadyForHarvesting ? 1 : 0;
           }
        }

        public void HarvestCrop(string msg)
        {
           Summary.WriteMessage(this, "Harvesting crop " + (Crop as IModel).Name + ". Message: " + msg, MessageType.Diagnostic);
           Crop.Harvest();
           Crop.EndCrop();
        }
    }
}
```
        Manager WheatFertiliser
          Amount = 350
          CropName = Wheat
```csharp
using Models.Soils;
using System.Linq;
using System;
using Models.Core;
using Models.PMF;
namespace Models
{
    [Serializable]
    public class Script : Model
    {
        [Link] Clock Clock;
        [Link] Fertiliser Fertiliser;
        [Link] Summary Summary;
        
        
        [Description("Amount of fertiliser to be applied (kg/ha)")]
        public double Amount { get; set;}
        
        [Description("Crop to be fertilised")]
        public string CropName { get; set;}
        
        
        

        [EventSubscribe("Sowing")]
        private void OnSowing(object sender, EventArgs e)
        {
            Model crop = sender as Model;
            if (crop.Name.ToLower()==CropName.ToLower())
                Fertiliser.Apply(Amount: Amount, Type: Fertiliser.Types.UreaN);
        }
        
    }
}
```
        Manager BarleyManager
          Crop = [Barley]
          Verbose = False
          StartDate = 15-may
          EndDate = 10-jul
          MinESW = 0
          MinRain = 25
          RainDays = 3
          MustSow = True
          CultivarName = Dash
          SowingDepth = 30
          RowSpacing = 250
          Population = 180
```csharp
using Models.Interfaces;
using APSIM.Shared.Utilities;
using Models.Utilities;
using Models.Soils;
using Models.PMF;
using Models.Core;
using System;
using System.Linq;
using Models.Climate;

namespace Models
{
    [Serializable]
    public class Script : Model
    {
        [Link] private Clock Clock;
        [Link] private Summary Summary;
        [Link] private Soil Soil;
        [Link]
        private ISoilWater waterBalance;
        //[Link] Simulation Simulation;

        [Separator("Script Configuration")]
        [Description("Crop to manage")]
        public IPlant Crop { get; set; }

        [Description("Run script in verbose mode?")]
        [Tooltip("If enabled, the script will print a large number of diagnostics to the summary file, to aid debugging")]
        public bool Verbose { get; set; }

        [Separator("Sowing Conditions")]
        [Description("Start of sowing window (d-mmm)")]
        public string StartDate { get; set; }
        [Description("End of sowing window (d-mmm)")]
        public string EndDate { get; set; }
        [Description("Minimum extractable soil water for sowing (mm)")]
        public double MinESW { get; set; }
        [Description("Accumulated rainfall required for sowing (mm)")]
        public double MinRain { get; set; }
        [Description("Duration of rainfall accumulation (d)")]
        public int RainDays { get; set; }
        [Tooltip("If enabled, and if sowing conditions are not met, the crop will be sown on the final day of the sowing window.")]
        [Description("Must sow (yes/no)")]
        public bool MustSow { get; set; }

        [Separator("Sowing Properties")]
        [Description("Cultivar to be sown")]
        [Display(Type = DisplayType.CultivarName)]
        public string CultivarName { get; set; }
        [Description("Sowing depth (mm)")]
        public double SowingDepth { get; set; }
        [Description("Row spacing (mm)")]
        public double RowSpacing { get; set; }
        [Description("Plant population (/m2)")]
        public double Population { get; set; }

        public Accumulator accumulatedRain { get; private set; }
        private bool afterInit = false;
                
        [EventSubscribe("StartOfSimulation")]
        private void OnSimulationCommencing(object sender, EventArgs e)
        {
            if (Crop == null)
                throw new Exception("Crop must not be null in rotations");
            accumulatedRain = new Accumulator(this, "[Weather].Rain", RainDays);
            Summary.WriteMessage(this, this.FullPath + " - Commence, crop=" + (Crop as Model).Name, MessageType.Diagnostic);
            afterInit = true;
        }
        
        [EventSubscribe("DoManagement")]
        private void DoManagement(object sender, EventArgs e)
        {
            accumulatedRain.Update();
        }

        // Test whether we can sow a crop today
        // +ve number - yes
        // 0          - no
        // -ve number - no, out of scope (planting window)
        [Units("0-1")]
        public int CanSow
        {
            get
            {
                if (!afterInit)
                    return 0;
                bool isPossibleToday = false;
                bool inWindow = DateUtilities.WithinDates(StartDate, Clock.Today, EndDate);
                bool endOfWindow = DateUtilities.DatesEqual(EndDate, Clock.Today);
                if (!Crop.IsAlive && inWindow && accumulatedRain.Sum > MinRain && MathUtilities.Sum(waterBalance.ESW) > MinESW)
                    isPossibleToday = true;

                if (isPossibleToday)
                    return 1;
         
                if (!Crop.IsAlive && endOfWindow && MustSow)
                    return 1;

                if (!Crop.IsAlive && !inWindow)
                    return -1;
                return 0;
            }
        }

        public void SowCrop()
        {
            Summary.WriteMessage(this, this.FullPath + " -  sowing " + (Crop as Model).Name, MessageType.Diagnostic);
            Crop.Sow(population: Population, cultivar: CultivarName, depth: SowingDepth, rowSpacing: RowSpacing);    
        }

        [Units("0-1")] 
        public int CanHarvest
        {
            get
            {
                if (!afterInit)
                    return (0);
                //Summary.WriteMessage(this, "canLeave:" + Crop.IsReadyForHarvesting, MessageType.Diagnostic);
                return Crop.IsReadyForHarvesting ? 1 : 0;
            }
        }

        public void HarvestCrop(string msg)
        {
           Summary.WriteMessage(this, "Harvesting crop " + (Crop as IModel).Name + ". Message: " + msg, MessageType.Diagnostic);
           Crop.Harvest();
           Crop.EndCrop();
        }
    }
}
```
        Manager BarleyFertiliser
          Amount = 350
          CropName = Barley
          script: same as in Senario2.Simulation.Field.WheatFertiliser
        Manager CanolaManager
          Crop = [Canola]
          Verbose = False
          StartDate = 15-may
          EndDate = 10-jul
          MinESW = 0
          MinRain = 25
          RainDays = 3
          MustSow = True
          CultivarName = AV_Garnet
          SowingDepth = 10
          RowSpacing = 250
          Population = 45
          script: same as in Senario2.Simulation.Field.WheatManager
        Manager CanolaFertiliser
          Amount = 350
          CropName = Canola
          script: same as in Senario2.Simulation.Field.WheatFertiliser
        Report
          VariableNames:
            [Clock].Today
            [Wheat].Grain.Total.Wt*10 as WheatYield
            [Barley].Grain.Total.Wt*10 as BarleyYield
            [Canola].Grain.Total.Wt*10 as CanolaYield
            [Soil].Water.MM
          EventNames:
            [Wheat].Harvesting
            [Barley].Harvesting
            [Canola].Harvesting
            17-mar
        Soil Synthetic Soil Derived from the SLGA: ASCOrder=NA; ASCSubOrder=NA; SoilType=Sandy Loam over Sandy Clay; Site=32598_32115; NearestTown=ROBE; Region=Naracoorte Coastal Plain; State=South Australia; NaturalVegetation=Unknown; ApsoilNumber=9999; Latitude=-37.1655; Longitude=139.762471; LocationAccuracy=+- 90m; YearOfSampling=2024; Comments=Landuse is Grazing natural vegetation
          DataSource=Soil and Landscape Grid of Australia. This soil parameter file was automatically generated from the GSM National Surfaces using pedotransfer functions.
          Water: Thickness=[150, 150, 150, 150, 200, 200]; InitialValues=[0.162, 0.16, 0.168, 0.173, 0.172, 0.171]; InitialPAWmm=15.9033; RelativeTo=LL15; FilledFromTop=false
          Physical
            Thickness  BD       AirDry     LL15      DUL       SAT       KS
            150        1.35853  0.0473996  0.142199  0.242781  0.423109  46.4201
            150        1.40711  0.0478225  0.143467  0.226155  0.412784  27.2103
            150        1.41518  0.0509148  0.152744  0.230016  0.414413  17.9827
            150        1.41523  0.0524938  0.157481  0.233798  0.416021  15.3859
            200        1.42536  0.0525384  0.157615  0.231707  0.413136  14.6164
            200        1.43974  0.0520664  0.156199  0.227906  0.408413  14.4322
            SoilCrop WheatSoil: LL=[0.148234, 0.148429, 0.157355, 0.16168, 0.161173, 0.159069]; KL=[0.06, 0.06, 0.0596733, 0.05502, 0.04802, 0.04002]; XF=[1, 1, 1, 1, 1, 1]
            SoilCrop EucalyptusSoil: LL=[0.148234, 0.148429, 0.157355, 0.16168, 0.161173, 0.159069]; KL=[0.06, 0.06, 0.0596733, 0.05502, 0.04802, 0.04002]; XF=[1, 1, 1, 1, 1, 1]
            SoilCrop PinusSoil: LL=[0.148234, 0.148429, 0.157355, 0.16168, 0.161173, 0.159069]; KL=[0.06, 0.06, 0.0596733, 0.05502, 0.04802, 0.04002]; XF=[1, 1, 1, 1, 1, 1]
            SoilCrop SCRUMSoil: LL=[0.148234, 0.148429, 0.157355, 0.16168, 0.161173, 0.159069]; KL=[0.06, 0.06, 0.0596733, 0.05502, 0.04802, 0.04002]; XF=[1, 1, 1, 1, 1, 1]
            SoilCrop OatsSoil: LL=[0.148234, 0.148429, 0.157355, 0.16168, 0.161173, 0.159069]; KL=[0.06, 0.06, 0.0596733, 0.05502, 0.04802, 0.04002]; XF=[1, 1, 1, 1, 1, 1]
            SoilCrop SorghumSoil: LL=[0.14924, 0.149256, 0.158131, 0.162491, 0.162025, 0.159965]; KL=[0.07, 0.07, 0.0697142, 0.0656425, 0.0595175, 0.0525175]; XF=[1, 1, 1, 1, 1, 1]
            SoilCrop BarleySoil: LL=[0.14924, 0.149256, 0.158127, 0.162432, 0.161888, 0.159744]; KL=[0.07, 0.07, 0.0696637, 0.0648735, 0.0576676, 0.0494324]; XF=[1, 1, 1, 1, 1, 1]
            SoilCrop ChickpeaSoil: LL=[0.148234, 0.148429, 0.157381, 0.16206, 0.16172, 0.15951]; KL=[0.06, 0.06, 0.06, 0.06, 0.0554077, 0.0461769]; XF=[1, 1, 1, 1, 1, 1]
            SoilCrop MungbeanSoil
              LL=[0.148234, 0.148429, 0.157381, 0.161909, 0.161174, 0.158783]
              KL=[0.06, 0.06, 0.06, 0.05802, 0.04803, 0.03603]
              XF=[1, 1, 1, 1, 1, 1]
            SoilCrop CottonSoil
              LL=[0.152257, 0.151736, 0.160471, 0.165113, 0.165024, 0.162974]
              KL=[0.1, 0.1, 0.1, 0.1, 0.1, 0.0944722]
              XF=[1, 1, 1, 1, 1, 1]
            SoilCrop CanolaSoil: LL=[0.148234, 0.148429, 0.157355, 0.16168, 0.161173, 0.159069]; KL=[0.06, 0.06, 0.0596733, 0.05502, 0.04802, 0.04002]; XF=[1, 1, 1, 1, 1, 1]
            SoilCrop Pigeon PeaSoil: LL=[0.148234, 0.148429, 0.157381, 0.16206, 0.161692, 0.159428]; KL=[0.06, 0.06, 0.06, 0.06, 0.055025, 0.045025]; XF=[1, 1, 1, 1, 1, 1]
            SoilCrop MaizeSoil: LL=[0.148234, 0.148429, 0.157355, 0.16168, 0.161173, 0.159069]; KL=[0.06, 0.06, 0.0596733, 0.05502, 0.04802, 0.04002]; XF=[1, 1, 1, 1, 1, 1]
            SoilCrop CowpeasSoil: LL=[0.148234, 0.148429, 0.157355, 0.16168, 0.161173, 0.159069]; KL=[0.06, 0.06, 0.0596733, 0.05502, 0.04802, 0.04002]; XF=[1, 1, 1, 1, 1, 1]
            SoilCrop SunflowerSoil
              LL=[0.152209, 0.151131, 0.159224, 0.163207, 0.162412, 0.159998]
              KL=[0.0995196, 0.0926765, 0.0838529, 0.0750294, 0.0647353, 0.0529706]
              XF=[1, 1, 1, 1, 1, 1]
            SoilCrop FababeanSoil
              LL=[0.150245, 0.150082, 0.158926, 0.163587, 0.163438, 0.161118]
              KL=[0.08, 0.08, 0.08, 0.08, 0.0785857, 0.0686]
              XF=[1, 1, 1, 1, 1, 1]
            SoilCrop LucerneSoil: LL=[0.152257, 0.151736, 0.160471, 0.165113, 0.165024, 0.16337]; KL=[0.1, 0.1, 0.1, 0.1, 0.1, 0.1]; XF=[1, 1, 1, 1, 1, 1]
            SoilCrop PerennialsSoil
              LL=[0.152257, 0.151736, 0.160471, 0.165113, 0.165024, 0.162974]
              KL=[0.1, 0.1, 0.1, 0.1, 0.1, 0.0944722]
              XF=[1, 1, 1, 1, 1, 1]
            SoilCrop LupinsSoil: LL=[0.148234, 0.148429, 0.157355, 0.16168, 0.161173, 0.159069]; KL=[0.06, 0.06, 0.0596733, 0.05502, 0.04802, 0.04002]; XF=[1, 1, 1, 1, 1, 1]
            SoilCrop LentilsSoil: LL=[0.148234, 0.148429, 0.157355, 0.16168, 0.161173, 0.159069]; KL=[0.06, 0.06, 0.0596733, 0.05502, 0.04802, 0.04002]; XF=[1, 1, 1, 1, 1, 1]
            SoilCrop TriticaleSoil: LL=[0.14924, 0.149256, 0.157787, 0.161733, 0.160918, 0.158483]; KL=[0.07, 0.07, 0.0652591, 0.0557136, 0.0445773, 0.03185]; XF=[1, 1, 1, 1, 1, 1]
            SoilCrop MilletSoil: LL=[0.14924, 0.149256, 0.158131, 0.162491, 0.162025, 0.159965]; KL=[0.07, 0.07, 0.0697142, 0.0656425, 0.0595175, 0.0525175]; XF=[1, 1, 1, 1, 1, 1]
            SoilCrop SoybeansSoil: LL=[0.148234, 0.148429, 0.157355, 0.16168, 0.161173, 0.159069]; KL=[0.06, 0.06, 0.0596733, 0.05502, 0.04802, 0.04002]; XF=[1, 1, 1, 1, 1, 1]
            SoilCrop Pasture grasses & legumesSoil: LL=[0.148234, 0.148429, 0.157355, 0.16168, 0.161173, 0.159069]; KL=[0.06, 0.06, 0.0596733, 0.05502, 0.04802, 0.04002]; XF=[1, 1, 1, 1, 1, 1]
          WaterBalance SoilWater: SummerDate=1-nov; SummerU=6; SummerCona=6; WinterDate=1-apr; WinterU=2; WinterCona=2; DiffusConst=216.575; DiffusSlope=51.3944; Salb=0.13; CN2Bare=78; CNRed=20; CNCov=0; DischargeWidth=10; CatchmentArea=161087; PSIDul=-100; Thickness=[150, 150, 150, 150, 200, 200]
            SWCON=[0.447548, 0.374153, 0.315955, 0.294673, 0.241676, 0.240894]
          Organic: FOMCNRatio=40; CarbonUnits=Total
            Thickness  Carbon    SoilCNRatio  FBiom    FInert    FOM
            150        1.74136   12.1221      0.04     0.204162  475.475
            150        0.816209  12.1221      0.03106  0.440886  303.176
            150        0.47131   12.1221      0.01404  0.741468  193.314
            150        0.400901  12.1221      0.01     0.871727  123.262
            200        0.322901  12.1221      0.01     0.993681  67.6477
            200        0.246051  12.1221      0.01     1         37.1259
          Chemical: Thickness=[150, 150, 150, 150, 200, 200]; PH=[7.06332, 7.44491, 7.44426, 7.43318, 7.7276, 8.06226]; PHUnits=Water
          Solute NO3: Thickness=[1800]; InitialValues=[3]; InitialValuesUnits=ppm; WaterTableConcentration=0; D0=0; DepthConstant=0; MaxDepthSoluteAccessible=0; RunoffEffectivenessAtMovingSolute=0; MaxEffectiveRunoff=0
          Solute NH4: Thickness=[1800]; InitialValues=[1]; InitialValuesUnits=ppm; WaterTableConcentration=0; D0=0; DepthConstant=0; MaxDepthSoluteAccessible=0; RunoffEffectivenessAtMovingSolute=0; MaxEffectiveRunoff=0
          Solute Urea: Thickness=[1800]; InitialValues=[0]; InitialValuesUnits=ppm; WaterTableConcentration=0; D0=0; DepthConstant=0; MaxDepthSoluteAccessible=0; RunoffEffectivenessAtMovingSolute=0; MaxEffectiveRunoff=0
          CERESSoilTemperature
          Nutrient
